OpenVSP model (file version 5), 8 components.
Geometry view with OpenVSP parameter names; values to 6 digits, angles in degrees, lengths in the model's unit.
Overall bounding box: X_Min=-0.229 X_Len=0.984832 Y_Min=-5.58142 Y_Len=11.1628 Z_Min=-0.762 Z_Len=1.524

Wing "CleanWing"
  location (X Y Z) 0 0 0, rotation 0 0 0
  symmetric about XZ
  bounding box size 0.755527 9.63862 0.0812677
  totals: TotalSpan=9.63862 TotalProjectedSpan=9.63862 TotalChord=0.642575 TotalArea=6.19354 TotalAR=15
  root: chord 0.75597, twist 2, NACA 4-series Camber=0 CamberLoc=0.2 ThickChord=0.1
  sections:
    n  Span     Root_Chord  Tip_Chord  Area     Sweep  Sweep_Location  Dihedral  Twist  Twist_Location  tip airfoil
    1  4.81931  0.75597     0.529179   3.09677  0      0.7             0         0      0               NACA 4-series Camber=0 CamberLoc=0.2 ThickChord=0.12

Propeller "PropGeom", child of "CleanWing"
  location (X Y Z) -0.229 0.888492 0, rotation 0 0 0
  symmetric about XZ
  bounding box size 0 2.3529 0.57592
  Design: Diameter=0.57592 NumBlade=3 Beta34=20 UseBeta34Flag=1 Feather=0 Rotate=0 Precone=0 ReverseFlag=0 FoldAngle=0 PropMode=2 AF=151.538 CLi=0.538798 Chord=0.177656 Solidity=0.169649 ConstructXoC=0.5 FeatherAxisXoC=0.5 FeatherOffsetXoC=0
  cross sections:
    n  RadiusFrac  shape
    0  0.2         ellipse Ellipse_Height=0.0115184 Ellipse_Width=0.0230368
    1  0.4         NACA 16-series Chord=0.0478734 IdealCl=0.7 ThickChord=0.144074
    2  1           NACA 16-series Chord=0.0374348 IdealCl=0.2 ThickChord=0.03
  Chord along r/R (cubic Bezier): 0.2: 0.08, 0.333333: 0.15, 0.466667: 0.2, 0.6: 0.2, 0.716667: 0.2, 0.833333: 0.2, 0.95: 0.2, 0.966667: 0.2, 0.983333: 0.2, 1: 0.13
  Twist along r/R (PCHIP): 0.2: 46.75, 0.75: 20, 1: 13
  Thick along r/R (cubic Bezier): 0.2: 0.5, 0.233333: 0.3, 0.266667: 0.225, 0.3: 0.2, 0.4: 0.125, 0.5: 0.115, 0.6: 0.1, 0.733333: 0.075, 0.866667: 0.055, 1: 0.03
  CLI along r/R (cubic Bezier): 0.2: 0, 0.266667: 0.7, 0.333333: 0.7, 0.4: 0.7, 0.466667: 0.7, 0.533333: 0.7, 0.6: 0.7, 0.733333: 0.7, 0.866667: 0.7, 1: 0.2

Propeller "PropGeom", child of "PropGeom"
  location (X Y Z) -0.229 4.81942 0, rotation 0 0 0
  symmetric about XZ
  bounding box size 0 11.1628 1.524
  Design: Diameter=1.524 NumBlade=3 Beta34=20 UseBeta34Flag=1 Feather=0 Rotate=0 Precone=0 ReverseFlag=0 FoldAngle=0 PropMode=2 AF=151.538 CLi=0.538798 Chord=0.177656 Solidity=0.169649 ConstructXoC=0.5 FeatherAxisXoC=0.5 FeatherOffsetXoC=0
  cross sections:
    n  RadiusFrac  shape
    0  0.2         ellipse Ellipse_Height=0.03048 Ellipse_Width=0.06096
    1  0.4         NACA 16-series Chord=0.126683 IdealCl=0.7 ThickChord=0.144074
    2  1           NACA 16-series Chord=0.09906 IdealCl=0.2 ThickChord=0.03
  blade curves as in "PropGeom"

Propeller "PropGeom", child of "PropGeom"
  location (X Y Z) -0.229 1.46407 0, rotation 0 0 0
  symmetric about XZ
  bounding box size 0 3.50406 0.57592
  Design: Diameter=0.57592 NumBlade=3 Beta34=20 UseBeta34Flag=1 Feather=0 Rotate=0 Precone=0 ReverseFlag=0 FoldAngle=0 PropMode=2 AF=151.538 CLi=0.538798 Chord=0.177656 Solidity=0.169649 ConstructXoC=0.5 FeatherAxisXoC=0.5 FeatherOffsetXoC=0
  cross sections:
    n  RadiusFrac  shape
    0  0.2         ellipse Ellipse_Height=0.0115184 Ellipse_Width=0.0230368
    1  0.4         NACA 16-series Chord=0.0478734 IdealCl=0.7 ThickChord=0.144074
    2  1           NACA 16-series Chord=0.0374348 IdealCl=0.2 ThickChord=0.03
  blade curves as in "PropGeom"

Propeller "PropGeom", child of "PropGeom"
  location (X Y Z) -0.229 2.04064 0, rotation 0 0 0
  symmetric about XZ
  bounding box size 0 4.65719 0.57592
  Design: Diameter=0.57592 NumBlade=3 Beta34=20 UseBeta34Flag=1 Feather=0 Rotate=0 Precone=0 ReverseFlag=0 FoldAngle=0 PropMode=2 AF=151.538 CLi=0.538798 Chord=0.177656 Solidity=0.169649 ConstructXoC=0.5 FeatherAxisXoC=0.5 FeatherOffsetXoC=0
  cross sections:
    n  RadiusFrac  shape
    0  0.2         ellipse Ellipse_Height=0.0115184 Ellipse_Width=0.0230368
    1  0.4         NACA 16-series Chord=0.0478734 IdealCl=0.7 ThickChord=0.144074
    2  1           NACA 16-series Chord=0.0374348 IdealCl=0.2 ThickChord=0.03
  blade curves as in "PropGeom"

Propeller "PropGeom", child of "PropGeom"
  location (X Y Z) -0.229 2.61671 0, rotation 0 0 0
  symmetric about XZ
  bounding box size 0 5.80934 0.57592
  Design: Diameter=0.57592 NumBlade=3 Beta34=20 UseBeta34Flag=1 Feather=0 Rotate=0 Precone=0 ReverseFlag=0 FoldAngle=0 PropMode=2 AF=151.538 CLi=0.538798 Chord=0.177656 Solidity=0.169649 ConstructXoC=0.5 FeatherAxisXoC=0.5 FeatherOffsetXoC=0
  cross sections:
    n  RadiusFrac  shape
    0  0.2         ellipse Ellipse_Height=0.0115184 Ellipse_Width=0.0230368
    1  0.4         NACA 16-series Chord=0.0478734 IdealCl=0.7 ThickChord=0.144074
    2  1           NACA 16-series Chord=0.0374348 IdealCl=0.2 ThickChord=0.03
  blade curves as in "PropGeom"

Propeller "PropGeom", child of "PropGeom"
  location (X Y Z) -0.229 3.19278 0, rotation 0 0 0
  symmetric about XZ
  bounding box size 0 6.96148 0.57592
  Design: Diameter=0.57592 NumBlade=3 Beta34=20 UseBeta34Flag=1 Feather=0 Rotate=0 Precone=0 ReverseFlag=0 FoldAngle=0 PropMode=2 AF=151.538 CLi=0.538798 Chord=0.177656 Solidity=0.169649 ConstructXoC=0.5 FeatherAxisXoC=0.5 FeatherOffsetXoC=0
  cross sections:
    n  RadiusFrac  shape
    0  0.2         ellipse Ellipse_Height=0.0115184 Ellipse_Width=0.0230368
    1  0.4         NACA 16-series Chord=0.0478734 IdealCl=0.7 ThickChord=0.144074
    2  1           NACA 16-series Chord=0.0374348 IdealCl=0.2 ThickChord=0.03
  blade curves as in "PropGeom"

Propeller "PropGeom", child of "PropGeom"
  location (X Y Z) -0.229 3.76885 0, rotation 0 0 0
  symmetric about XZ
  bounding box size 0 8.11362 0.57592
  Design: Diameter=0.57592 NumBlade=3 Beta34=20 UseBeta34Flag=1 Feather=0 Rotate=0 Precone=0 ReverseFlag=0 FoldAngle=0 PropMode=2 AF=151.538 CLi=0.538798 Chord=0.177656 Solidity=0.169649 ConstructXoC=0.5 FeatherAxisXoC=0.5 FeatherOffsetXoC=0
  cross sections:
    n  RadiusFrac  shape
    0  0.2         ellipse Ellipse_Height=0.0115184 Ellipse_Width=0.0230368
    1  0.4         NACA 16-series Chord=0.0478734 IdealCl=0.7 ThickChord=0.144074
    2  1           NACA 16-series Chord=0.0374348 IdealCl=0.2 ThickChord=0.03
  blade curves as in "PropGeom"

VSPAERO settings: Sref=6.19354 bref=9.63862 cref=0.642575 Xcg=131.889 Ycg=0 Zcg=13.3858 AlphaStart=4 AlphaEnd=18 AlphaNpts=1 BetaStart=0 BetaEnd=0 BetaNpts=1 MachStart=0.145773 MachEnd=0 MachNpts=1 ReCref=1.32e+06 Vinf=50 Rho=1.225
